δ := 10^-4
h(ξ) := .5*(1 + tanh(ξ/δ))
.5*(1 + tanh(ξ/δ))
-0.5*(tanh(ξ/δ)^2 - 1)/δ
dh(ξ) := -0.5*(tanh(ξ/δ)^2 - 1)/δ
u(t) := h(t - 1) + 2*h(t - 2) + 3*h(t - 3) + 4*h(t - 4)
du(t) := dh(t - 1) + 2*dh(t - 2) + 3*dh(t - 3) + 4*dh(t - 4)
U(t) := Φ(t - 1) + 2*Φ(t - 2) + 3*Φ(t - 3) + 4*Φ(t - 4)
g(t) := (U(t + 10^-6) - U(t - 10^-6))/(2*10^-6)
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du(t) := dh(t - 1) + 2*dh(t - 2) + 3*dh(t - 3) + 4*dh(t - 4)
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